Simulations: Version=159
  DataStore
  Experiment pd
    Memo README
      This experiment uses a fertiliser factor to simulate an N-rate trial. The graph shows the effect of the fertiliser applications on total soil nitrate level in each treatment.
    Factors
      Permutation
        Factor SowDate
          Specification=[SowingRule].Script.SowDate =01-jan, 02-jan, 03-jan, 04-jan, 05-jan, 06-jan, 07-jan, 08-jan, 09-jan, 10-jan, 11-jan, 12-jan, 13-jan, 14-jan, 15-jan, 16-jan, 17-jan, 18-jan, 19-jan, 20-jan, 21-jan, 22-jan, 23-jan, 24-jan, 25-jan, 26-jan, 27-jan, 28-jan, 29-jan, 30-jan, 31-jan, 01-feb, 02-feb, 03-feb, 04-feb, 05-feb, 06-feb, 07-feb, 08-feb, 09-feb, 10-feb, 11-feb, 12-feb, 13-feb, 14-feb, 15-feb, 16-feb, 17-feb, 18-feb, 19-feb, 20-feb, 21-feb, 22-feb, 23-feb, 24-feb, 25-feb, 26-feb, 27-feb, 28-feb, 01-mar, 02-mar, 03-mar, 04-mar, 05-mar, 06-mar, 07-mar, 08-mar, 09-mar, 10-mar, 11-mar, 12-mar, 13-mar, 14-mar, 15-mar, 16-mar, 17-mar, 18-mar, 19-mar, 20-mar, 21-mar, 22-mar, 23-mar, 24-mar, 25-mar, 26-mar, 27-mar, 28-mar, 29-mar, 30-mar, 31-mar, 01-apr, 02-apr, 03-apr, 04-apr, 05-apr, 06-apr, 07-apr, 08-apr, 09-apr, 10-apr, 11-apr, 12-apr, 13-apr, 14-apr, 15-apr, 16-apr, 17-apr, 18-apr, 19-apr, 20-apr, 21-apr, 22-apr, 23-apr, 24-apr, 25-apr, 26-apr, 27-apr, 28-apr, 29-apr, 30-apr, 01-may, 02-may, 03-may, 04-may, 05-may, 06-may, 07-may, 08-may, 09-may, 10-may, 11-may, 12-may, 13-may, 14-may, 15-may, 16-may, 17-may, 18-may, 19-may, 20-may, 21-may, 22-may, 23-may, 24-may, 25-may, 26-may, 27-may, 28-may, 29-may, 30-may, 31-may, 01-jun, 02-jun, 03-jun, 04-jun, 05-jun, 06-jun, 07-jun, 08-jun, 09-jun, 10-jun, 11-jun, 12-jun, 13-jun, 14-jun, 15-jun, 16-jun, 17-jun, 18-jun, 19-jun, 20-jun, 21-jun, 22-jun, 23-jun, 24-jun, 25-jun, 26-jun, 27-jun, 28-jun, 29-jun, 30-jun, 01-jul, 02-jul, 03-jul, 04-jul, 05-jul, 06-jul, 07-jul, 08-jul, 09-jul, 10-jul, 11-jul, 12-jul, 13-jul, 14-jul, 15-jul, 16-jul, 17-jul, 18-jul, 19-jul, 20-jul, 21-jul, 22-jul, 23-jul, 24-jul, 25-jul, 26-jul, 27-jul, 27-jul, 29-jul, 30-jul, 31-jul, 01-aug, 02-aug, 03-aug, 04-aug, 05-aug, 06-aug, 07-aug, 08-aug, 09-aug, 10-aug, 11-aug, 12-aug, 13-aug, 14-aug, 15-aug, 16-aug, 17-aug, 18-aug, 19-aug, 20-aug, 21-aug, 22-aug, 23-aug, 24-aug, 25-aug, 26-aug, 27-aug, 28-aug, 29-aug, 30-aug, 31-aug, 01-sep, 02-sep, 03-sep, 04-sep, 05-sep, 06-sep, 07-sep, 08-sep, 09-sep, 10-sep, 11-sep, 12-sep, 13-sep, 14-sep, 15-sep, 16-sep, 17-sep, 18-sep, 19-sep, 20-sep, 21-sep, 22-sep, 23-sep, 24-sep, 25-sep, 26-sep, 27-sep, 28-sep, 29-sep, 30-sep, 01-oct, 02-oct, 03-oct, 04-oct, 05-oct, 06-oct, 07-oct, 08-oct, 09-oct, 10-oct, 11-oct, 12-oct, 13-oct, 14-oct, 15-oct, 16-oct, 17-oct, 18-oct, 19-oct, 20-oct, 21-oct, 22-oct, 23-oct, 24-oct, 25-oct, 26-oct, 27-oct, 28-oct, 29-oct, 30-oct, 31-oct, 01-nov, 02-nov, 03-nov, 04-nov, 05-nov, 06-nov, 07-nov, 08-nov, 09-nov, 10-nov, 11-nov, 12-nov, 13-nov, 14-nov, 15-nov, 16-nov, 17-nov, 18-nov, 19-nov, 20-nov, 21-nov, 22-nov, 23-nov, 24-nov, 25-nov, 26-nov, 27-nov, 28-nov, 29-nov, 30-nov, 01-dec, 02-dec, 03-dec, 04-dec, 05-dec, 06-dec, 07-dec, 08-dec, 09-dec, 10-dec, 11-dec, 12-dec, 13-dec, 14-dec, 15-dec, 16-dec, 17-dec, 18-dec, 19-dec, 20-dec, 21-dec, 22-dec, 23-dec, 24-dec, 25-dec, 26-dec, 27-dec, 28-dec, 29-dec, 30-dec, 31-dec
    Simulation Base_one
      Clock: Start=1999-01-01; End=2000-01-01
      Summary SummaryFile
      Weather: FileName=%root%\Examples\WeatherFiles\Dalby.met
      SoilArbitrator Soil Arbitrator
      Zone Field: Area=1; Slope=0; AspectAngle=0; Altitude=50
        Report: EventNames=[Maize].Harvesting
          VariableNames:
            [Clock].Today
            [Maize].Phenology.CurrentStageName
            [Maize].AboveGround.Wt
            [Maize].AboveGround.N
            [Maize].Grain.Wt
            [Maize].Grain.Size
            [Maize].Grain.NumberFunction
            [Maize].Grain.N
            [Maize].Total.Wt
            Sum of [Weather].Rain from [Maize].Sowing to [Maize].Harvesting as InCropRainfall
            Mean of [Weather].MeanT from [Maize].Sowing to [Maize].Harvesting as InCropTemperature
        Fertiliser
        SurfaceOrganicMatter: InitialResidueName=wheat_stubble; InitialResidueType=wheat; InitialResidueMass=500; InitialStandingFraction=0; InitialCPR=0; InitialCNR=100
        Soil SoilType =  clay: SoilType=SoilType =  clay; State=Iburengerazuba; Country=Rwanda; ApsoilNumber=0; Latitude=-2.28997; Longitude=29.2117
          DataSource=Original source is www.isric.org. See: https://www.isric.org/explore/soilgrids/faq-soilgrids  2022-11-21 12:41:12
          Comments=resolution = 250m - taxonomic classification name = clay - drainage class = NA - elevation = NA - slope = NA - geomdesc = NA
          Physical
            Thickness  ParticleSizeClay  ParticleSizeSand  ParticleSizeSilt  BD      AirDry    LL15      DUL       SAT    KS
            50         42.8              30.3              26.9              1.0234  0.128098  0.256196  0.384651  0.521  98.1751
            100        40.3              30.7              29                1.0492  0.241218  0.241218  0.371348  0.521  123.391
            150        39.6              29.8              30.6              1.0664  0.236915  0.236915  0.368717  0.497  132.449
            300        39.6              29.7              30.7              1.1266  0.236571  0.236571  0.368751  0.488  131.592
            400        40.5              29.6              29.9              1.1696  0.241682  0.241682  0.373392  0.478  121.157
            1000       40.3              30.3              29.4              1.1782  0.240579  0.240579  0.371642  0.44   122.402
            SoilCrop MaizeSoil
              LL=[0.266196, 0.251218, 0.246915, 0.246571, 0.251682, 0.250579]
              KL=[0.06, 0.0491238, 0.0402192, 0.0329287, 0.0269597, 0.0220728]
              XF=[1, 1, 1, 1, 1, 1]
            SoilCrop SoybeanSoil
              LL=[0.266196, 0.251218, 0.246915, 0.246571, 0.251682, 0.250579]
              KL=[0.06, 0.0491238, 0.0402192, 0.0329287, 0.0269597, 0.0220728]
              XF=[1, 1, 1, 1, 1, 1]
            SoilCrop WheatSoil
              LL=[0.266196, 0.251218, 0.246915, 0.246571, 0.251682, 0.250579]
              KL=[0.06, 0.0491238, 0.0402192, 0.0329287, 0.0269597, 0.0220728]
              XF=[1, 1, 1, 1, 1, 1]
          WaterBalance SoilWater: SummerDate=1-Nov; SummerU=5; SummerCona=5; WinterDate=1-Apr; WinterU=5; WinterCona=5; DiffusConst=40; DiffusSlope=16; Salb=0.12; CN2Bare=73; CNRed=20; CNCov=0.8; PSIDul=-100; Thickness=[50, 100, 150, 300, 400, 1000]; SWCON=[0.25, 0.25, 0.25, 0.25, 0.25, 0.25]
          Organic: FOMCNRatio=40; CarbonUnits=Total
            Thickness  Carbon  SoilCNRatio  FBiom      FInert    FOM
            50         4.95    12           0.04       0.8       150
            100        3.26    12           0.0327492  0.80804   122.81
            150        2.53    12           0.0268128  0.816161  100.548
            300        1.35    12           0.0219525  0.824364  82.3217
            400        1.03    12           0.0179732  0.832649  67.3993
            1000       1.12    12           0.0147152  0.841017  55.1819
          Chemical: Thickness=[50, 100, 150, 300, 400, 1000]; PH=[5.5, 5.4, 5.4, 5.4, 5.4, 5.4]; PHUnits=Water
          Water: Thickness=[150, 150, 300, 300, 300, 300, 300]; InitialValues=[0.521, 0.497, 0.488, 0.48, 0.472, 0.457, 0.452]; RelativeTo=LL15; FilledFromTop=false
          CERESSoilTemperature Temperature
          Nutrient
          Solute NO3: Thickness=[150, 150, 300, 300, 300, 300, 300]; InitialValues=[1, 1, 1, 1, 1, 1, 1]; InitialValuesUnits=ppm; WaterTableConcentration=0; D0=0; DepthConstant=0; MaxDepthSoluteAccessible=0; RunoffEffectivenessAtMovingSolute=0; MaxEffectiveRunoff=0
          Solute NH4: Thickness=[150, 150, 300, 300, 300, 300, 300]; InitialValues=[0.1, 0.1, 0.1, 0.1, 0.1, 0.1, 0.1]; InitialValuesUnits=ppm; WaterTableConcentration=0; D0=0; DepthConstant=0; MaxDepthSoluteAccessible=0; RunoffEffectivenessAtMovingSolute=0; MaxEffectiveRunoff=0
          Solute Urea: Thickness=[150, 150, 300, 300, 300, 300, 300]; InitialValues=[0, 0, 0, 0, 0, 0, 0]; InitialValuesUnits=kg/ha; WaterTableConcentration=0; D0=0; DepthConstant=0; MaxDepthSoluteAccessible=0; RunoffEffectivenessAtMovingSolute=0; MaxEffectiveRunoff=0
        Plant Maize
          Cultivar rwanda
            Command:
              [Phenology].Juvenile.Target.FixedValue = 250
              [Phenology].Photosensitive.Target.XYPairs.X = 0, 12.5, 24
              [Phenology].Photosensitive.Target.XYPairs.Y = 0, 0, 264.5
              [Phenology].FlagLeafToFlowering.Target.FixedValue = 10
              [Phenology].FloweringToGrainFilling.Target.FixedValue = 170
              [Phenology].GrainFilling.Target.FixedValue = 550
              [Rachis].DMDemands.Structural.DMDemandFunction.MaximumOrganWt.FixedValue = 14
              [Grain].MaximumGrainsPerCob.FixedValue = 468
              [Grain].MaximumPotentialGrainSize.FixedValue = 0.361
        MicroClimate: a_interception=0; b_interception=1; c_interception=0; d_interception=0; SoilHeatFluxFraction=0.4; MinimumHeightDiffForNewLayer=0; NightInterceptionFraction=0.5; ReferenceHeight=2
        Manager SowingRule
          Crop = [Maize]
          SowDate = 24-Jul
          CultivarName = rwanda
          SowingDepth = 50
          RowSpacing = 750
          Population = 6
```csharp
using APSIM.Shared.Utilities;
using Models.Utilities;
using Models.Soils;
using Models.PMF;
using Models.Core;
using System;

namespace Models
{
    [Serializable]
    public class Script : Model
    {
        [Link] Clock Clock;
        [Link] Fertiliser Fertiliser;
        [Link] Summary Summary;
        [Link] Soil Soil;
        
        [Description("Crop")]
        public IPlant Crop { get; set; }

        [Description("Sowing date (d-mmm)")]
        public string SowDate { get; set; }

        [Display(Type = DisplayType.CultivarName)]
        [Description("Cultivar to be sown")]
        public string CultivarName { get; set; }

        [Description("Sowing depth (mm)")]
        public double SowingDepth { get; set; }

        [Description("Row spacing (mm)")]
        public double RowSpacing { get; set; }

        [Description("Plant population (/m2)")]
        public double Population { get; set; }

        [EventSubscribe("DoManagement")]
        private void OnDoManagement(object sender, EventArgs e)
        {
            if (DateUtilities.WithinDates(SowDate, Clock.Today, SowDate))
            {
                Crop.Sow(population: Population, cultivar: CultivarName, depth: SowingDepth, rowSpacing: RowSpacing);    
            }
        }
    }
}
```
        Manager SowingFertiliser
          Amount = 200
          CropName = maize
```csharp
using Models.Soils;
using System;
using Models.Core;
using Models.PMF;
namespace Models
{
    [Serializable]
    public class Script : Model
    {
        [Link] Clock Clock;
        [Link] Fertiliser Fertiliser;
        [Link] Summary Summary;
        
        
        [Description("Amount of fertiliser to be applied (kg/ha)")]
        public double Amount { get; set; }
        
        [Description("Crop to be fertilised")]
        public string CropName { get; set; }
        
        
        

        [EventSubscribe("Sowing")]
        private void OnSowing(object sender, EventArgs e)
        {
            Model crop = sender as Model;
            if (crop.Name.ToLower() == CropName.ToLower())
                Fertiliser.Apply(Amount: Amount, Type: Fertiliser.Types.NO3N);
        }
        
    }
}
```
        Manager Harvesting
```csharp
using Models.PMF.Phen;
using APSIM.Shared.Utilities;
using System.Xml.Serialization;
using Models;
using Models.PMF;
using Models.Soils;
using System.Text;
using System.Collections.Generic;
using Models.Core;
using System;
using Models.Soils.Nutrients;

namespace Models
{
    [Serializable] 
    public class Script : Model
    {
        [Link(ByName = true)] private Plant Maize;
        [Link] private Zone zone;
        [Link(Type = LinkType.Path, Path = "[Maize].Phenology")]
        private Phenology phenology;
                    
        
        [EventSubscribe("StartOfSimulation")]
        private void OnSimulationCommencing(object sender, EventArgs e)
        {
        }
        
        [EventSubscribe("DoManagement")]
        private void OnDoManagement(object sender, EventArgs e)
        {
            if (phenology.CurrentPhase.Name == "ReadyForHarvesting")
            {
                Maize.Harvest();
                Maize.EndCrop();
            }
        }
        
        [EventSubscribe("DoManagementCalculations")]
        private void OnDoManagementCalculations(object sender, EventArgs e)
        {
            
        }
    }
}
```
    Simulation Base_two
      Clock: Start=1990-01-01; End=2000-12-31
      Summary SummaryFile
      Weather: FileName=%root%\Examples\WeatherFiles\Dalby.met
      SoilArbitrator Soil Arbitrator
      Zone Field: Area=1; Slope=0; AspectAngle=0; Altitude=50
        Report: EventNames=[Maize].Harvesting
          VariableNames:
            [Clock].Today
            [Maize].Phenology.CurrentStageName
            [Maize].AboveGround.Wt
            [Maize].AboveGround.N
            [Maize].Grain.Wt
            [Maize].Grain.Size
            [Maize].Grain.NumberFunction
            [Maize].Grain.N
            [Maize].Total.Wt
        Fertiliser
        Manager SowingRule
          Crop = [Maize]
          SowDate = 24-Jul
          CultivarName = rwanda
          SowingDepth = 50
          RowSpacing = 750
          Population = 6
```csharp
using Models.Soils.Nutrients;
using System;
using Models.Core;
using Models.PMF;
using Models.Soils;
using Models.Soils.Nutrients;
using Models.Utilities;
using APSIM.Shared.Utilities;

namespace Models
{
    [Serializable]
    public class Script : Model
    {
        [Link] Clock Clock;
        [Link] Fertiliser Fertiliser;
        [Link] Summary Summary;
        [Link] Soil Soil;
        Accumulator accumulatedRain;
        
        [Description("Crop")]
        public IPlant Crop { get; set; }
        [Description("Sowing date (d-mmm)")]
        public string SowDate { get; set; }
    [Display(Type = DisplayType.CultivarName, PlantName = "Barley")]
        [Description("Cultivar to be sown")]
        public string CultivarName { get; set; }
        [Description("Sowing depth (mm)")]
        public double SowingDepth { get; set; }
        [Description("Row spacing (mm)")]
        public double RowSpacing { get; set; }
        [Description("Plant population (/m2)")]
        public double Population { get; set; }
        


        [EventSubscribe("DoManagement")]
        private void OnDoManagement(object sender, EventArgs e)
        {
            if (DateUtilities.WithinDates(SowDate, Clock.Today, SowDate))
            {
                Crop.Sow(population: Population, cultivar: CultivarName, depth: SowingDepth, rowSpacing: RowSpacing);    
            }
        
        }
        
    }
}
```
        SurfaceOrganicMatter: InitialResidueName=wheat_stubble; InitialResidueType=wheat; InitialResidueMass=500; InitialStandingFraction=0; InitialCPR=0; InitialCNR=100
        Soil SoilType =  clay: same as pd.Base_one.Field.SoilType =  clay
        Plant Maize: same as pd.Base_one.Field.Maize
        MicroClimate: a_interception=0; b_interception=1; c_interception=0; d_interception=0; SoilHeatFluxFraction=0.4; MinimumHeightDiffForNewLayer=0; NightInterceptionFraction=0.5; ReferenceHeight=2
        Manager SowingRule1
          Crop =
          SowDate = 24-Jul
          CultivarName = mridina
          SowingDepth = 50
          RowSpacing = 750
          Population = 6
          script: same as in pd.Base_two.Field.SowingRule
        Manager FertiliserRule
          ApplicationAmount = 500
          FertType = NO3N
          ApplicationDate = 12/30/2003 00:00:00
```csharp
using Models.Soils;
using System;
using Models.Core;
using Models.PMF;

namespace Models
{
    [Serializable]
    public class Script : Model
    {
        [Link]
        private Fertiliser fertiliser;

           [Link]
           private Clock clock;

        [Description("Amount (kg/ha) of fertiliser to apply")]
        public double ApplicationAmount {get; set;}

        [Description("Type of fertiliser to apply")]
        public Fertiliser.Types FertType { get; set; }

        [Description("Date of fertiliser application")]
        public DateTime ApplicationDate {get; set;}

        [EventSubscribe("DoManagement")]
        private void OnDoManagement(object sender, EventArgs e)
        {
            if (clock.Today.Date.Equals(ApplicationDate))
                fertiliser.Apply(Amount:ApplicationAmount,Type:FertType);
        }
    }
}
```
        Manager Harvesting: same as pd.Base_one.Field.Harvesting
