Simulations: Version=160
  DataStore
  Experiment pd
    Memo README
      This experiment uses a fertiliser factor to simulate an N-rate trial. The graph shows the effect of the fertiliser applications on total soil nitrate level in each treatment.
    Factors
      Permutation
        Factor SowDate
          Specification=[SowingRule].Script.SowDate =01-jan, 08-jan, 15-jan, 22-jan, 29-jan, 05-feb, 12-feb, 19-feb, 26-feb, 05-mar, 12-mar, 19-mar, 26-mar, 02-apr, 09-apr, 16-apr, 23-apr, 30-apr
    Simulation Base_one
      Clock: Start=1981-01-01; End=2020-12-31
      Summary SummaryFile
      Weather: FileName=D:/project/wth_loc_22.met
      SoilArbitrator Soil Arbitrator
      Zone Field: Area=1; Slope=0; AspectAngle=0; Altitude=50
        Report: EventNames=[Maize].Harvesting
          VariableNames:
            [Clock].Today
            [Maize].Phenology.CurrentStageName
            [Maize].AboveGround.Wt
            [Maize].AboveGround.N
            [Maize].Grain.Wt
            [Maize].Grain.Size
            [Maize].Grain.NumberFunction
            [Maize].Grain.N
            [Maize].Total.Wt
            [Maize].Phenology.EmergenceDAS
            [Maize].Phenology.FloweringDAS
            [Maize].Phenology.MaturityDAS
            Sum of [Weather].Rain from [Maize].Sowing to [Maize].Harvesting as InCropRainfall
            Sum of [Weather].Radn from [Maize].Sowing to [Maize].Harvesting as InCropRadn
            Mean of [Weather].MaxT from [Maize].Sowing to [Maize].Harvesting as InCropMaxTemperature
            Mean of [Weather].MinT from [Maize].Sowing to [Maize].Harvesting as InCropMinTemperature
            Sum of [Soil].SoilWater.Eo from [Maize].Sowing to [Maize].Harvesting as InCropET
            Sum of [Soil].SoilWater.Es from [Maize].Sowing to [Maize].Harvesting as InCropES
            ([Maize].Grain.Wt * 10) / InCropET as WUE2
            sum([Soil].SoilWater.ESW) as TotalESW
            [Maize].Grain.Total.Wt*10 as Yield
            [Maize].SowingDate
        Fertiliser
        SurfaceOrganicMatter: InitialResidueName=wheat_stubble; InitialResidueType=wheat; InitialResidueMass=500; InitialStandingFraction=0; InitialCPR=0; InitialCNR=10
        Soil SoilType =  clay: SoilType=SoilType =  clay; Country=Rwanda; ApsoilNumber=0; Latitude=-2.725; Longitude=29.825
          DataSource=Original source is www.isric.org. See: https://www.isric.org/explore/soilgrids/faq-soilgrids  2023-02-06 09:30:54
          Comments=resolution = 250m - taxonomic classification name = clay - drainage class = NA - elevation = NA - slope = NA - geomdesc = NA
          Physical
            Thickness  ParticleSizeClay  ParticleSizeSand  ParticleSizeSilt  BD      AirDry    LL15      DUL       SAT    KS
            50         39.4              38.4              22.2              1.1008  0.118052  0.236103  0.358187  0.521  124.46
            100        38.7              39.9              21.4              1.1266  0.231806  0.231806  0.352503  0.521  133.436
            150        41.5              37.3              21.2              1.1696  0.248009  0.248009  0.370971  0.497  96.8879
            300        43.4              36.4              20.2              1.1868  0.258959  0.258959  0.382401  0.488  77.1972
            400        43.2              36.3              20.5              1.2212  0.257617  0.257617  0.381343  0.478  79.258
            1000       43.4              35.7              20.9              1.2556  0.258678  0.258678  0.382963  0.44   78.3612
            SoilCrop MaizeSoil
              LL=[0.246103, 0.241806, 0.258009, 0.268959, 0.267617, 0.268678]
              KL=[0.06, 0.0491238, 0.0402192, 0.0329287, 0.0269597, 0.0220728]
              XF=[1, 1, 1, 1, 1, 1]
            SoilCrop SoybeanSoil
              LL=[0.246103, 0.241806, 0.258009, 0.268959, 0.267617, 0.268678]
              KL=[0.06, 0.0491238, 0.0402192, 0.0329287, 0.0269597, 0.0220728]
              XF=[1, 1, 1, 1, 1, 1]
            SoilCrop WheatSoil
              LL=[0.246103, 0.241806, 0.258009, 0.268959, 0.267617, 0.268678]
              KL=[0.06, 0.0491238, 0.0402192, 0.0329287, 0.0269597, 0.0220728]
              XF=[1, 1, 1, 1, 1, 1]
          WaterBalance SoilWater: SummerDate=1-Nov; SummerU=5; SummerCona=5; WinterDate=1-Apr; WinterU=5; WinterCona=5; DiffusConst=40; DiffusSlope=16; Salb=0.12; CN2Bare=73; CNRed=20; CNCov=0.8; PSIDul=-100; Thickness=[50, 100, 150, 300, 400, 1000]; SWCON=[0.25, 0.25, 0.25, 0.25, 0.25, 0.25]
          Organic: FOMCNRatio=40; CarbonUnits=Total
            Thickness  Carbon  SoilCNRatio  FBiom      FInert    FOM
            50         2.69    12           0.04       0.8       150
            100        1.88    12           0.0327492  0.80804   122.81
            150        1.57    12           0.0268128  0.816161  100.548
            300        1.25    12           0.0219525  0.824364  82.3217
            400        0.7     12           0.0179732  0.832649  67.3993
            1000       0.48    12           0.0147152  0.841017  55.1819
          Chemical: Thickness=[50, 100, 150, 300, 400, 1000]; PH=[5.6, 5.6, 5.6, 5.6, 5.5, 5.5]; PHUnits=Water
          Water: Thickness=[150, 150, 300, 300, 300, 300, 300]; InitialValues=[0.521, 0.497, 0.488, 0.48, 0.472, 0.457, 0.452]; InitialPAWmm=397.536; RelativeTo=LL15; FilledFromTop=false
          CERESSoilTemperature Temperature
          Nutrient
          Solute NO3: Thickness=[150, 150, 300, 300, 300, 300, 300]; InitialValues=[1, 1, 1, 1, 1, 1, 1]; InitialValuesUnits=ppm; WaterTableConcentration=0; D0=0; DepthConstant=0; MaxDepthSoluteAccessible=0; RunoffEffectivenessAtMovingSolute=0; MaxEffectiveRunoff=0
          Solute NH4: Thickness=[150, 150, 300, 300, 300, 300, 300]; InitialValues=[0.1, 0.1, 0.1, 0.1, 0.1, 0.1, 0.1]; InitialValuesUnits=ppm; WaterTableConcentration=0; D0=0; DepthConstant=0; MaxDepthSoluteAccessible=0; RunoffEffectivenessAtMovingSolute=0; MaxEffectiveRunoff=0
          Solute Urea: Thickness=[150, 150, 300, 300, 300, 300, 300]; InitialValues=[0, 0, 0, 0, 0, 0, 0]; InitialValuesUnits=kg/ha; WaterTableConcentration=0; D0=0; DepthConstant=0; MaxDepthSoluteAccessible=0; RunoffEffectivenessAtMovingSolute=0; MaxEffectiveRunoff=0
        Plant Maize
          Cultivar Early
            Command:
              [Phenology].Juvenile.Target.FixedValue = 260
              [Phenology].Photosensitive.Target.XYPairs.X = 0, 12.5, 24
              [Phenology].Photosensitive.Target.XYPairs.Y = 0, 0, 264.5
              [Phenology].FlagLeafToFlowering.Target.FixedValue = 10
              [Phenology].FloweringToGrainFilling.Target.FixedValue = 170
              [Phenology].GrainFilling.Target.FixedValue = 550
              [Rachis].DMDemands.Structural.DMDemandFunction.MaximumOrganWt.FixedValue = 14
              [Grain].MaximumGrainsPerCob.FixedValue = 486
              [Grain].MaximumPotentialGrainSize.FixedValue = 0.361
          Cultivar Mid
            Command:
              [Phenology].Juvenile.Target.FixedValue = 280
              [Phenology].Photosensitive.Target.XYPairs.X = 0, 12.5, 24
              [Phenology].Photosensitive.Target.XYPairs.Y = 0, 0, 264.5
              [Phenology].FlagLeafToFlowering.Target.FixedValue = 10
              [Phenology].FloweringToGrainFilling.Target.FixedValue = 170
              [Phenology].GrainFilling.Target.FixedValue = 550
              [Rachis].DMDemands.Structural.DMDemandFunction.MaximumOrganWt.FixedValue = 14
              [Grain].MaximumGrainsPerCob.FixedValue = 504
              [Grain].MaximumPotentialGrainSize.FixedValue = 0.361
          Cultivar Late
            Command:
              [Phenology].Juvenile.Target.FixedValue = 285
              [Phenology].Photosensitive.Target.XYPairs.X = 0, 12.5, 24
              [Phenology].Photosensitive.Target.XYPairs.Y = 0, 0, 0
              [Phenology].FlagLeafToFlowering.Target.FixedValue = 1
              [Phenology].FloweringToGrainFilling.Target.FixedValue = 170
              [Phenology].GrainFilling.Target.FixedValue = 865
              [Phenology].Maturing.Target.FixedValue = 1
              [Phenology].MaturityToHarvestRipe.Target.FixedValue = 100
              [Rachis].DMDemands.Structural.DMDemandFunction.MaximumOrganWt.FixedValue = 36
        MicroClimate: a_interception=0; b_interception=1; c_interception=0; d_interception=0; SoilHeatFluxFraction=0.4; MinimumHeightDiffForNewLayer=0; NightInterceptionFraction=0.5; ReferenceHeight=2
        Manager SowingRule
          Crop = [Maize]
          SowDate = 24-Jul
          CultivarName = sc501
          SowingDepth = 50
          RowSpacing = 750
          Population = 5.3
```csharp
using APSIM.Shared.Utilities;
using Models.Utilities;
using Models.Soils;
using Models.PMF;
using Models.Core;
using System;

namespace Models
{
    [Serializable]
    public class Script : Model
    {
        [Link] Clock Clock;
        [Link] Fertiliser Fertiliser;
        [Link] Summary Summary;
        [Link] Soil Soil;
        
        [Description("Crop")]
        public IPlant Crop { get; set; }

        [Description("Sowing date (d-mmm)")]
        public string SowDate { get; set; }

        [Display(Type = DisplayType.CultivarName)]
        [Description("Cultivar to be sown")]
        public string CultivarName { get; set; }

        [Description("Sowing depth (mm)")]
        public double SowingDepth { get; set; }

        [Description("Row spacing (mm)")]
        public double RowSpacing { get; set; }

        [Description("Plant population (/m2)")]
        public double Population { get; set; }

        [EventSubscribe("DoManagement")]
        private void OnDoManagement(object sender, EventArgs e)
        {
            if (DateUtilities.WithinDates(SowDate, Clock.Today, SowDate))
            {
                Crop.Sow(population: Population, cultivar: CultivarName, depth: SowingDepth, rowSpacing: RowSpacing);    
            }
        }
    }
}
```
        Manager Harvesting
```csharp
using Models.PMF.Phen;
using APSIM.Shared.Utilities;
using System.Xml.Serialization;
using Models;
using Models.PMF;
using Models.Soils;
using System.Text;
using System.Collections.Generic;
using Models.Core;
using System;
using Models.Soils.Nutrients;

namespace Models
{
    [Serializable] 
    public class Script : Model
    {
        [Link(ByName = true)] private Plant Maize;
        [Link] private Zone zone;
        [Link(Type = LinkType.Path, Path = "[Maize].Phenology")]
        private Phenology phenology;
                    
        
        [EventSubscribe("StartOfSimulation")]
        private void OnSimulationCommencing(object sender, EventArgs e)
        {
        }
        
        [EventSubscribe("DoManagement")]
        private void OnDoManagement(object sender, EventArgs e)
        {
            if (phenology.CurrentPhase.Name == "ReadyForHarvesting")
            {
                Maize.Harvest();
                Maize.EndCrop();
            }
        }
        
        [EventSubscribe("DoManagementCalculations")]
        private void OnDoManagementCalculations(object sender, EventArgs e)
        {
            
        }
    }
}
```
        Manager Fertilise at sowing
          Crop = [Maize]
          FertiliserType = DAP
          Amount = 150
```csharp
using Models.Soils;
using System;
using System.Linq;
using Models.Core;
using Models.PMF;
namespace Models
{
    [Serializable]
    public class Script : Model
    {
        [Link] Clock Clock;
        [Link] Fertiliser Fertiliser;
        
        [Description("Crop to be fertilised")]
        public IPlant Crop { get; set; }

        [Description("Type of fertiliser to apply? ")] 
        public Fertiliser.Types FertiliserType { get; set; }
    
        [Description("Amount of fertiliser to be applied (kg/ha)")]
        public double Amount { get; set; }
        
        [EventSubscribe("Sowing")]
        private void OnSowing(object sender, EventArgs e)
        {
            Model crop = sender as Model;
            if (Crop != null && crop.Name.ToLower() == (Crop as IModel).Name.ToLower())
                Fertiliser.Apply(Amount: Amount, Type: FertiliserType);
        }
    }
}
```
        Manager Fertilise topup
          FertiliserType = Urea
          Threshold = 100
```csharp
using Models.Soils;
using APSIM.Shared.Utilities;
using Models.Soils.Nutrients;
using Models.PMF;
using Models.Core;
using System;
using System.Linq;
using Models.Soils.Nutrients;
namespace Models
{
    [Serializable]
    public class Script : Model
    {
        [Link] Clock Clock;
        [Link] Fertiliser Fertiliser;
        [Link(ByName=true)] Solute NO3;

        [Description("Type of fertiliser to apply? ")] 
        public Fertiliser.Types FertiliserType { get; set; }
    
        [Description("Threshold amount of NO3 to topup to (kg/ha)")]
        public double Threshold { get; set;}
        
        [EventSubscribe("DoManagement")]
        private void OnDoManagement(object sender, EventArgs e)
        {
            double Amount = Threshold - MathUtilities.Sum(NO3.kgha);
            Fertiliser.Apply(Amount: Amount, Type: FertiliserType);
        }
    }
}
```
        Manager Reset on sowing
          ResetWater = Yes
          ResetNutrients = Yes
          ResetSOM = Yes
```csharp
using Models.Soils.Nutrients;
using APSIM.Shared.Utilities;
using Models.Surface;
using Models.Utilities;
using Models.Soils.Nutrients;
using Models.Soils;
using Models.PMF;
using Models.Core;
using System;
using Models.Interfaces;

namespace Models
{
    [Serializable]
    public class Script : Model
    {
        [Link] private Plant Wheat;
        [Link] private ISoilWater SoilWater;
        [Link] private Nutrient nutrient;
        [Link] private SurfaceOrganicMatter SOM;
        [Link] private Summary Summary;

        [Description("Reset Water? (Yes or No)")]
        public string ResetWater {get;set;}

        [Description("Reset Soil Nutrients? (Yes or No)")]
        public string ResetNutrients {get;set;}

        [Description("Reset Surface Organic Matter? (Yes or No)")]
        public string ResetSOM {get;set;}

        [EventSubscribe("Sowing")]
        private void OnSowing(object sender, EventArgs e)
        {
            if (ResetWater == "Yes")
            {
                Summary.WriteMessage(this, "Reset Water", MessageType.Diagnostic);
                SoilWater.Reset();
            }
            if (ResetNutrients == "Yes")
            {
                Summary.WriteMessage(this, "Reset Nutrients", MessageType.Diagnostic);
                nutrient.Reset();
            }
            if (ResetSOM == "Yes")
            {
                Summary.WriteMessage(this, "Reset Surface OM", MessageType.Diagnostic);
                SOM.Reset();
            }
        }
    }
}
```
    Simulation Base_two
      Clock: Start=1990-01-01; End=2000-12-31
      Summary SummaryFile
      Weather: FileName=%root%\Examples\WeatherFiles\Dalby.met
      SoilArbitrator Soil Arbitrator
      Zone Field: Area=1; Slope=0; AspectAngle=0; Altitude=50
        Report: EventNames=[Maize].Harvesting
          VariableNames:
            [Clock].Today
            [Maize].Phenology.CurrentStageName
            [Maize].AboveGround.Wt
            [Maize].AboveGround.N
            [Maize].Grain.Wt
            [Maize].Grain.Size
            [Maize].Grain.NumberFunction
            [Maize].Grain.N
            [Maize].Total.Wt
        Fertiliser
        Manager SowingRule
          Crop = [Maize]
          SowDate = 24-Jul
          CultivarName = rwanda
          SowingDepth = 50
          RowSpacing = 750
          Population = 6
```csharp
using Models.Soils.Nutrients;
using System;
using Models.Core;
using Models.PMF;
using Models.Soils;
using Models.Soils.Nutrients;
using Models.Utilities;
using APSIM.Shared.Utilities;

namespace Models
{
    [Serializable]
    public class Script : Model
    {
        [Link] Clock Clock;
        [Link] Fertiliser Fertiliser;
        [Link] Summary Summary;
        [Link] Soil Soil;
        Accumulator accumulatedRain;
        
        [Description("Crop")]
        public IPlant Crop { get; set; }
        [Description("Sowing date (d-mmm)")]
        public string SowDate { get; set; }
    [Display(Type = DisplayType.CultivarName, PlantName = "Barley")]
        [Description("Cultivar to be sown")]
        public string CultivarName { get; set; }
        [Description("Sowing depth (mm)")]
        public double SowingDepth { get; set; }
        [Description("Row spacing (mm)")]
        public double RowSpacing { get; set; }
        [Description("Plant population (/m2)")]
        public double Population { get; set; }
        


        [EventSubscribe("DoManagement")]
        private void OnDoManagement(object sender, EventArgs e)
        {
            if (DateUtilities.WithinDates(SowDate, Clock.Today, SowDate))
            {
                Crop.Sow(population: Population, cultivar: CultivarName, depth: SowingDepth, rowSpacing: RowSpacing);    
            }
        
        }
        
    }
}
```
        SurfaceOrganicMatter: InitialResidueName=wheat_stubble; InitialResidueType=wheat; InitialResidueMass=500; InitialStandingFraction=0; InitialCPR=0; InitialCNR=100
        Soil SoilType =  clay: SoilType=SoilType =  clay; State=Iburengerazuba; Country=Rwanda; ApsoilNumber=0; Latitude=-2.28997; Longitude=29.2117
          DataSource=Original source is www.isric.org. See: https://www.isric.org/explore/soilgrids/faq-soilgrids  2022-11-21 12:41:12
          Comments=resolution = 250m - taxonomic classification name = clay - drainage class = NA - elevation = NA - slope = NA - geomdesc = NA
          Physical
            Thickness  ParticleSizeClay  ParticleSizeSand  ParticleSizeSilt  BD      AirDry    LL15      DUL       SAT    KS
            50         42.8              30.3              26.9              1.0234  0.128098  0.256196  0.384651  0.521  98.1751
            100        40.3              30.7              29                1.0492  0.241218  0.241218  0.371348  0.521  123.391
            150        39.6              29.8              30.6              1.0664  0.236915  0.236915  0.368717  0.497  132.449
            300        39.6              29.7              30.7              1.1266  0.236571  0.236571  0.368751  0.488  131.592
            400        40.5              29.6              29.9              1.1696  0.241682  0.241682  0.373392  0.478  121.157
            1000       40.3              30.3              29.4              1.1782  0.240579  0.240579  0.371642  0.44   122.402
            SoilCrop MaizeSoil
              LL=[0.266196, 0.251218, 0.246915, 0.246571, 0.251682, 0.250579]
              KL=[0.06, 0.0491238, 0.0402192, 0.0329287, 0.0269597, 0.0220728]
              XF=[1, 1, 1, 1, 1, 1]
            SoilCrop SoybeanSoil
              LL=[0.266196, 0.251218, 0.246915, 0.246571, 0.251682, 0.250579]
              KL=[0.06, 0.0491238, 0.0402192, 0.0329287, 0.0269597, 0.0220728]
              XF=[1, 1, 1, 1, 1, 1]
            SoilCrop WheatSoil
              LL=[0.266196, 0.251218, 0.246915, 0.246571, 0.251682, 0.250579]
              KL=[0.06, 0.0491238, 0.0402192, 0.0329287, 0.0269597, 0.0220728]
              XF=[1, 1, 1, 1, 1, 1]
          WaterBalance SoilWater: same as pd.Base_one.Field.SoilType =  clay.SoilWater
          Organic: FOMCNRatio=40; CarbonUnits=Total
            Thickness  Carbon  SoilCNRatio  FBiom      FInert    FOM
            50         4.95    12           0.04       0.8       150
            100        3.26    12           0.0327492  0.80804   122.81
            150        2.53    12           0.0268128  0.816161  100.548
            300        1.35    12           0.0219525  0.824364  82.3217
            400        1.03    12           0.0179732  0.832649  67.3993
            1000       1.12    12           0.0147152  0.841017  55.1819
          Chemical: Thickness=[50, 100, 150, 300, 400, 1000]; PH=[5.5, 5.4, 5.4, 5.4, 5.4, 5.4]; PHUnits=Water
          Water: Thickness=[150, 150, 300, 300, 300, 300, 300]; InitialValues=[0.521, 0.497, 0.488, 0.48, 0.472, 0.457, 0.452]; InitialPAWmm=424.824; RelativeTo=LL15; FilledFromTop=false
          CERESSoilTemperature Temperature
          Nutrient
          Solute NO3: same as pd.Base_one.Field.SoilType =  clay.NO3
          Solute NH4: same as pd.Base_one.Field.SoilType =  clay.NH4
          Solute Urea: same as pd.Base_one.Field.SoilType =  clay.Urea
        Plant Maize
          Cultivar rwanda
            Command:
              [Phenology].Juvenile.Target.FixedValue = 250
              [Phenology].Photosensitive.Target.XYPairs.X = 0, 12.5, 24
              [Phenology].Photosensitive.Target.XYPairs.Y = 0, 0, 264.5
              [Phenology].FlagLeafToFlowering.Target.FixedValue = 10
              [Phenology].FloweringToGrainFilling.Target.FixedValue = 170
              [Phenology].GrainFilling.Target.FixedValue = 550
              [Rachis].DMDemands.Structural.DMDemandFunction.MaximumOrganWt.FixedValue = 14
              [Grain].MaximumGrainsPerCob.FixedValue = 468
              [Grain].MaximumPotentialGrainSize.FixedValue = 0.361
        MicroClimate: a_interception=0; b_interception=1; c_interception=0; d_interception=0; SoilHeatFluxFraction=0.4; MinimumHeightDiffForNewLayer=0; NightInterceptionFraction=0.5; ReferenceHeight=2
        Manager SowingRule1
          Crop =
          SowDate = 24-Jul
          CultivarName = mridina
          SowingDepth = 50
          RowSpacing = 750
          Population = 6
          script: same as in pd.Base_two.Field.SowingRule
        Manager FertiliserRule
          ApplicationAmount = 500
          FertType = NO3N
          ApplicationDate = 12/30/2003 00:00:00
```csharp
using Models.Soils;
using System;
using Models.Core;
using Models.PMF;

namespace Models
{
    [Serializable]
    public class Script : Model
    {
        [Link]
        private Fertiliser fertiliser;

           [Link]
           private Clock clock;

        [Description("Amount (kg/ha) of fertiliser to apply")]
        public double ApplicationAmount {get; set;}

        [Description("Type of fertiliser to apply")]
        public Fertiliser.Types FertType { get; set; }

        [Description("Date of fertiliser application")]
        public DateTime ApplicationDate {get; set;}

        [EventSubscribe("DoManagement")]
        private void OnDoManagement(object sender, EventArgs e)
        {
            if (clock.Today.Date.Equals(ApplicationDate))
                fertiliser.Apply(Amount:ApplicationAmount,Type:FertType);
        }
    }
}
```
        Manager Harvesting: same as pd.Base_one.Field.Harvesting
